# ============================================================
# Relax single fullerene
# ============================================================

units           metal
dimension       3
boundary        p p p
atom_style      atomic
newton          on
atom_modify     map yes

read_data       fullerene.lammps-data

mass            1 12.011
labelmap        atom 1 C

pair_style      mace no_domain_decomposition
pair_coeff      * * "../../MACE.model-lammps.pt" C

neighbor        2.0 bin
neigh_modify    every 1 delay 0 check yes

timestep        0.001

thermo          10
thermo_style    custom step pe fmax

dump            relax_dump all atom 10 fullerene_relax.dump

reset_timestep  0
minimize        0 1e-8 1000 10000

write_data      relaxed_fullerene.lammps-data

undump          relax_dump
print           "Single fullerene relaxation done"
